// COMSOL Multiphysics 6.1.0.252 model "二维能带（面外）.mph"
// Outline of the model tree

Parameters
  ax = 0.005
  b1_Gamma = 0
  b2_Gamma = 0
  b1_K = pi/(ax*(sqrt(3)/2)*sqrt(3))
  b2_K = 0
  b1_M = b1_K*cos(30[deg])*cos(30[deg])
  b2_M = b1_K*cos(30[deg])*sin(30[deg])
  kp = 0
  zeta = 0
  r = 0.002  // 小圆半径
  rr = 0.003  // 大圆半径
  p = 0.001  // 小圆偏移量

Functions
  pw1: Piecewise
    funcname = kx
    arg = kp
    pieces = 
      {0, 1, b1_Gamma+kp/(1)*(b1_K-b1_Gamma)}
      {1, 1+1/2, b1_K+(kp-1)/(1/2)*(b1_M-b1_K)}
      {1+1/2, sqrt(3)/2+1+1/2, b1_M+(kp-(1+1/2))/(sqrt(3)/2)*(b1_Gamma-b1_M)}
  pw2: Piecewise
    funcname = ky
    arg = kp
    pieces = 
      {0, 1, b2_Gamma+kp/(1)*(b2_K-b2_Gamma)}
      {1, 1+1/2, b2_K+(kp-1)/(1/2)*(b2_M-b2_K)}
      {1+1/2, sqrt(3)/2+1+1/2, b2_M+(kp-(1+1/2))/(sqrt(3)/2)*(b2_Gamma-b2_M)}
  an5: Analytic "X_fun" | funcname = X_fun; expr = (ai+b2*s)*cos(s); args = s; fununit = 1; argunit = 1
  an6: Analytic "Y_fun" | funcname = Y_fun; expr = (ai+b2*s)*sin(s); args = s; fununit = 1; argunit = 1
  an7: Analytic "N_x" | funcname = N_x; expr = -d(Y_fun(s),s)/sqrt(d(X_fun(s),s)^2+d(Y_fun(s),s)^2); args = s
  an8: Analytic "N_y" | funcname = N_y; expr = d(X_fun(s),s)/sqrt(d(X_fun(s),s)^2+d(Y_fun(s),s)^2); args = s

Selections
  sel1: Explicit "physical domain" on domains 1, 3
  sel2: Explicit "Particle" on domains 1, 3
  sel3: Explicit "Particle surface" on no boundaries
  emw_dst_pc1: Explicit "Destination selection for 'Periodic Condition 1'" on no boundaries
  emw_dst_pc2: Explicit "Destination selection for 'Periodic Condition 2'" on no boundaries

Geometry
  geom1 "Geometry 1" (2D, length unit m)
    c2: Circle "圆 2" | r = rr
    c1: Circle "圆 1" | pos = {0, p}; r = r
    pol1: Polygon
      source = table
      table = 
        {0, -ax/sin(60[deg])}
        {ax, -ax/sqrt(3)}
        {ax, ax/sqrt(3)}
        {0, ax/sin(60[deg])}
        {-ax, ax/sqrt(3)}
        {-ax, -ax/sqrt(3)}
        {0, -ax/sin(60[deg])}
    rot5: Rotate "旋转 5" | input = c2; rot = zeta
    dif1: Difference "差集 1" | input = rot5; input2 = c1
    fin: Finalize "Form Union"

Materials
  mat2: Common "Air" on domains 1, 3
    def "Basic"
      relpermittivity = 1
      relpermeability = 1
      electricconductivity = 0
  mat3: Common "Copper" (disabled) on domains 1, 3
    def "Basic" (disabled)
      relpermeability = 1
      electricconductivity = 5.998e7[S/m]
      heatcapacity = 385[J/(kg*K)]
      relpermittivity = 10
      emissivity = 0.5
      density = 8700[kg/m^3]
      thermalconductivity = 400[W/(m*K)]
    linzRes "Linearized resistivity" (disabled)
      rho0 = 1.72e-8[ohm*m]
      alpha = 3.9e-3[1/K]
      Tref = 273.15[K]
  mat4: Common "ng8" (disabled) on no domains
    def "Basic"
      relpermittivity = 64
      relpermeability = 1
      electricconductivity = 0
  mat5: Common "fr4" (disabled) on no domains
    def "基本"
      relpermittivity = 4.4
      relpermeability = 4.5
      electricconductivity = 10E-14
  mat6: Common "材料 6" (disabled) on no domains
    def "基本"
      relpermittivity = 1.5
      relpermeability = 1.72
      electricconductivity = 57142857
  mat7: Common "Silicon" on domains 2
    def "Basic"
      relpermeability = 1
      electricconductivity = 1e-12[S/m]
      thermalexpansioncoefficient = 2.6e-6[1/K]
      heatcapacity = 700[J/(kg*K)]
      relpermittivity = 11.7
      density = 2329[kg/m^3]
      thermalconductivity = 130[W/(m*K)]
    Enu "Young's modulus and Poisson's ratio"
      E = 170[GPa]
      nu = 0.28
    RefractiveIndex
      n = 3.48
      ki = 0

Physics
  emw: ElectromagneticWaves "Electromagnetic Waves, Frequency Domain" on all domains
    dependent variable E = {Ex, Ey, Ez}
    components.components = outofplane
    wee1: WaveEquationElectric (default)
    pec1: PerfectElectricConductor (default)
    init1: init "Initial Values 1" (default)
    pec2: DomainPerfectElectricConductor "理想电导体 2" (disabled) on no domains
    pec3: PerfectElectricConductor "理想电导体 3" (disabled) on no boundaries
    pc1: PeriodicCondition on boundaries 1, 6
      PeriodicType = Floquet
      kFloquet = {kx(kp), ky(kp), 0}
      destinationDomains: boundaries 6
    pc2: PeriodicCondition on boundaries 2, 5
      PeriodicType = Floquet
      kFloquet = {kx(kp), ky(kp), 0}
      destinationDomains: boundaries 5
    pc3: PeriodicCondition on boundaries 3, 4
      PeriodicType = Floquet
      kFloquet = {kx(kp), ky(kp), 0}
      destinationDomains: boundaries 4

Mesh
  mesh1 "网格 1"
    size: MeshSizeDefault "大小" | hauto = 3
    edg1: Edge "边 1" on boundaries 1, 3, 5
      size1: Size "大小 1" on boundaries 1, 3, 5 | hauto = 3
    cpe1: CopyEdge "复制边 1" | source = boundaries 1; destination = boundaries 6
    cpe2: CopyEdge "复制边 2" | source = boundaries 3; destination = boundaries 4
    cpe3: CopyEdge "复制边 3" | source = boundaries 5; destination = boundaries 2
    ftri1: FreeTri "自由三角形网格 1" on remaining entities

Studies
  std1 "Study 1"
    param: Parametric "Parametric Sweep" | pname = kp; plistarr = range(0,0.0473205080757,2.36602540378)
    eig: Eigenfrequency | neigs = 24; shift = 10[GHz]

Solver configurations
  sol1 "Solution 1" (study std1)
    v1: Variables "Dependent Variables 1"
    e1: Eigenvalue "Eigenvalue Solver 1"
      dDef: Direct
  sol2 "Parametric Solutions 1" (study std1)

Datasets
  dset1: Solution | solution = sol1
  dset2: Solution | solution = sol2

Derived values
  gev1: EvalGlobal "Global Evaluation 1" | data = dset2; table = tbl1; expr = emw.freq

Tables
  tbl1: Table
    // Global Evaluation 1 (emw.freq)
    kp | lambda | Frequency (Hz)
    0 | 3.0954e-09-9.70289e+09i | 1.54426e+09
    0 | 1.24508e-07-9.74643e+09i | 1.55119e+09
    0 | -2.78004e-07-9.75524e+09i | 1.55259e+09
    0 | -2.02447e-07-9.75679e+09i | 1.55284e+09
    0 | -0.0003132-9.76291e+09i | 1.55382e+09
    0 | 0.00103552-9.76388e+09i | 1.55397e+09
    0.0401021 | -7.14914e-07-9.70296e+09i | 1.54427e+09
    0.0401021 | 1.41e-07-9.74643e+09i | 1.55119e+09
    0.0401021 | 1.82328e-06-9.75519e+09i | 1.55259e+09
    0.0401021 | 1.95244e-06-9.75675e+09i | 1.55283e+09
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
Plots
  pg1: PlotGroup2D "Electric Field (emw)" | data = dset2
    surf1: Surface | expr = abs(emw.Hz)
  pg2: PlotGroup1D "Dispersion" | data = dset1
    glob1: Global | data = dset2; expr = emw.freq; descr = Frequency; xdata = expr; xdataexpr = kp
  pg3: PlotGroup2D "二维绘图组 3" | data = dset2
    surf1: Surface "表面 1" | expr = abs(emw.Hz)
    arws1: ArrowSurface "面上箭头 1" | expr = {emw.Poavx, emw.Poavy}; descr = 功率流，时均